! TUNNEL_V2_FEM


*msg,UI,FILE_name,'CREATING FINITE ELEMENT MODEL...'
TUNNEL # %s %/&
%35C

/prep7

CSYS,0

!!                                                                                                !!
!! 4.1  Tunnel                                                                                    !!
!!                                                                                                !!
TUNNEL_V2_FEMTUNNEL


!!                                                                                                !!
!! 4.2  Frames                                                                                    !!
!!                                                                                                !!
*if,GEO_FRM1_status,eq,1,then
  TUNNEL_V2_FEMFRAME , 1
*endif

*if,GEO_FRM2_status,eq,1,then
  TUNNEL_V2_FEMFRAME , 2
*endif


!!                                                                                                !!
!! 4.3  Headwall                                                                                  !!
!!                                                                                                !!
*if,GEO_HDW_status,gt,0,then
  TUNNEL_V2_FEMINLETS
*endif


!!                                                                                                !!
!! 4.3  Approach slab                                                                             !!
!!                                                                                                !!
*if,GEO_APR_status,eq,1,then
  cmsel,s,COMPA_approach
  aatt,MAT_conc,REAL_default,TYPE_shell181,CS_top,SEC_apr
  aesize,all,FEM_HDW_esize
  amesh,all
  l2acnt , 'COMPA_leftWall'  , 'COMPL_APR_leftInterface'  ,  , 1
  l2acnt , 'COMPA_rightWall' , 'COMPL_APR_rightInterface' ,  , 1
*endif


!!                                                                                                !!
!! 4.4  Piles                                                                                     !!
!!                                                                                                !!
*if,GEO_PILE_status,eq,1,then
  TUNNEL_V2_FEMPILE
*endif


!!                                                                                                !!
!! 4.5  Soil                                                                                      !!
!!                                                                                                !!
esel , none
cm   , COMPE_SOILSPR_FRIC_roof        , elem
cm   , COMPE_SOILSPR_FRIC_floorFlat   , elem
cm   , COMPE_SOILSPR_FRIC_floorCorbel , elem
cm   , COMPE_SOILSPR_FRIX_floorFlat   , elem
cm   , COMPE_SOILSPR_FRIX_floorCorbel , elem
cm   , COMPE_SOILSPR_FRIC_leftWall    , elem
cm   , COMPE_SOILSPR_FRIC_rightWall   , elem

esel,s,type,,TYPE_shell181
nsle,s,active
apportionedstats,,'FEM_nodes_apportioned'

! Normal springs
TUNNEL_V2_ELASTICBASE , 'COMPA_roof'         , CS_tunnel , '+Y' , 'roof'
TUNNEL_V2_ELASTICBASE , 'COMPA_FLOOR_flat'   , CS_tunnel , '-Y' , 'floorFlat'   , MAT_SOIL_floorFlatStiffnessMult
TUNNEL_V2_ELASTICBASE , 'COMPA_FLOOR_corbel' , CS_tunnel , '-Y' , 'floorCorbel'
! TUNNEL_V2_ELASTICBASE , 'COMPA_leftWall'     , CS_tunnel , '-X' , 'leftWall'
! TUNNEL_V2_ELASTICBASE , 'COMPA_rightWall'    , CS_tunnel , '+X' , 'rightWall'

! Tangential longitudinal springs (friction)
*if,SOIL_frictionOpt,eq,1,then
  ! TUNNEL_V2_ELASTICBASE , 'COMPA_rightWall'    , CS_tunnel , '-Z' , 'FRIC_rightWall'   , 1e-1 , 1
  TUNNEL_V2_ELASTICBASE , 'COMPA_roof'         , CS_tunnel , '-Z' , 'FRIC_roof'        , 1e-1 , 1
  TUNNEL_V2_ELASTICBASE , 'COMPA_FLOOR_flat'   , CS_tunnel , '-Z' , 'FRIC_floorFlat'   , 1e-1 , 1
  TUNNEL_V2_ELASTICBASE , 'COMPA_FLOOR_corbel' , CS_tunnel , '-Z' , 'FRIC_floorCorbel' , 1e-1 , 1
  ! TUNNEL_V2_ELASTICBASE , 'COMPA_leftWall'     , CS_tunnel , '-Z' , 'FRIC_leftWall'    , 1e-1 , 1

  ! TUNNEL_V2_ELASTICBASE , 'COMPA_FLOOR_flat'   , CS_tunnel , '-X' , 'FRIX_floorFlat'   , 1e-1 , 1
  ! TUNNEL_V2_ELASTICBASE , 'COMPA_FLOOR_corbel' , CS_tunnel , '-X' , 'FRIX_floorCorbel' , 1e-1 , 1
*endif


!! 4.5.7  Headwalls                                                                               !!
TUNNEL_V2_HDWBC


!! 4.5.8  Approach slabs                                                                          !!
*if,GEO_APR_status,eq,1,then
  TUNNEL_V2_ELASTICBASE , 'COMPA_approachSup' , CS_tunnel , '-Y' , 'approach'
  TUNNEL_V2_ELASTICBASE , 'COMPA_approachSup' , CS_tunnel , '+Y' , 'approachAbove'
*endif


!!                                                                                                !!
!! 4.6  Soil friction                                                                             !!
!!                                                                                                !!
*get,parmType,PARM,LOAD_thermal,TYPE
*if,parmType,EQ,0,AND,LOAD_thermal,NE,0,THEN
  TUNNEL_V2_FEMTHERMSPRINGS
*endif


!!                                                                                                !!
!! 4.7  Capture images                                                                            !!
!!                                                                                                !!
TUNNEL_V2_FEMPICS


!!                                                                                                !!
!! 4.8  Create special selection components                                                       !!
!!                                                                                                !!
! Tunnel roof elements that should be considered for shear force design
csys,CS_tunnel

cmsel,s,COMPA_roof
esla,s
nsle,s

! Elements near external walls
nsel , u , loc , x , 0                            , GEO_ROOF_thk
nsel , u , loc , x , GEO_TUN_totEffW-GEO_ROOF_thk , GEO_TUN_totEffW

! Elements near internal walls
*do,nthIWall,1,GEO_IWALL_count,1
  xIWall = GEO_IWALL_x_coords(nthIWall)
  nsel , u , loc , x , xIWall-GEO_ROOF_thk , xIWall+GEO_ROOF_thk
*enddo

! Define element component for shear foce results
esln,r,1
cm,COMPE_ROOF_shear,elem
cmsel,s,COMPA_roof
esla,s
cmsel,u,COMPE_ROOF_shear
cm,COMPE_ROOF_noShear,elem

allsel
csys,0

! Clean up
*msg,ui,
Mesh created!
